// SBML level 2 version 3

model NKG2D()

  // Compartments:
  compartment cell = 1;

  // Species:
  species S1 in cell = 192.7959/cell; S1 is "NKG2D()";
  species S2 in cell = 1463.265/cell; S2 is "CD45()";
  species S3 in cell = 5.251/cell; S3 is "pErk()";
  species S4 in cell = 435.2968/cell; S4 is "CD107a()";

  // Parameters:
  k1 = 0.1;
  k2 = 0.1;
  k3 = 0.95;

  // Assignment rules:
  NKG2D := 0 + S1;
  CD45 := 0 + S2;
  pErk := 0 + S3;
  CD107a := 0 + S4;

  // Reactions:
  R1: S1 => S2; k1*S1;
  R2: S2 => S3; k2*S2;
  R3: S3 => S4; k3*S3;

  // Unit definitions:
  unit substance = item;
end
